// SBML level 2 version 1
// Model Starts Here

model Aspartate()

  // Compartments:
  compartment compartment = 1;

  // Species:
  species Aspartate in compartment = 0;
  species AspartylPhosphate in compartment = 0;
  species Homoserine in compartment = 0;
  species Methionine in compartment = 0;
  species Threonine in compartment = 0;
  species Isoleucine in compartment = 0;
  species Aspartate_Semialdehyde in compartment = 0;
  species Lysine in compartment = 0;

  // Parameters:
  J0_J0_k = 0.1;
  J1_J1_k = 0.1;
  J2_J2_k = 0.1;
  J3_J3_k = 0.1;
  J4_J4_k = 0.1;
  J5_J5_k = 0.1;
  J6_J6_k = 0.1;
  J0_k = 0.1;
  J1_k = 0.1;
  J2_k = 0.1;
  J3_k = 0.1;
  J4_k = 0.1;
  J5_k = 0.1;
  J6_k = 0.1;

  // Reactions:
  J0: Aspartate => AspartylPhosphate; J0_J0_k*Aspartate;
  J1: AspartylPhosphate => Aspartate_Semialdehyde; J1_J1_k*AspartylPhosphate;
  J2: Aspartate_Semialdehyde => Homoserine; J2_J2_k*Aspartate_Semialdehyde;
  J3: Homoserine => Methionine; J3_J3_k*Homoserine;
  J4: Homoserine => Threonine; J4_J4_k*Homoserine;
  J5: Threonine => Isoleucine; J5_J5_k*Threonine;
  J6: Aspartate_Semialdehyde => Lysine; J6_J6_k*Aspartate_Semialdehyde;
end
